# Лабораторная работа 1.1. Решение нелинейных уравнений
# Исходные данные:
f(x) := 2*ln(x) + 2*x - 5
accuracy := 0.5*10^-4
# Полученные после перехода к канонической форме данные:
phi(x) := 2.5 - ln(x)
initialApproximationX := 1.9
delta := 0.5
# Отрезок, где ищется точное решение - это [1,4; 2,4]
# Метод простых итераций:
SimpleIterationsMethod(phi, initialApproximationX, accuracy) :=
    n ← 0
    while 1
        nextX ← phi(initialApproximationX)
        break if |nextX - initialApproximationX| < accuracy
        initialApproximationX ← nextX
        n ← n + 1
    [(nextX + initialApproximationX)/2; n]
resultSIM := SimpleIterationsMethod(phi, initialApproximationX, accuracy)
resultSIM = [1.87264; 11]
xSIM := 1.873
f(xSIM) = 0.00108285
# Метод секущих как видоизменение метода простых итераций:
SecantMethodForSIM(f, initialApproximationX, accuracy) :=
    n ← 0
    nextX ← initialApproximationX - f(initialApproximationX)*accuracy/(f(initialApproximationX + accuracy) - f(initialApproximationX))
    subsequentX ← (f(nextX)*initialApproximationX - f(initialApproximationX)*nextX)/(f(nextX) - f(initialApproximationX))
    initialApproximationX ← nextX
    nextX ← subsequentX
    n ← n + 1
    while |nextX - initialApproximationX| > accuracy
        subsequentX ← (f(nextX)*initialApproximationX - f(initialApproximationX)*nextX)/(f(nextX) - f(initialApproximationX))
        initialApproximationX ← nextX
        nextX ← subsequentX
        n ← n + 1
    [subsequentX; n]
resultSecantMforSIM := SecantMethodForSIM(f, initialApproximationX, accuracy)
resultSecantMforSIM = [1.87265; 2]
xSecantMforSIM := 1.873
f(xSecantMforSIM) = 0.00108285
# Метод Стеффенсена как видоизменение метода простых итераций:
SteffensenMethodForSIM(phi, initialApproximationX, accuracy) :=
    n ← 0
    nextX ← initialApproximationX
    subsequentX ← (nextX*phi(phi(nextX)) - phi(nextX)^2)/(phi(phi(nextX)) - 2*phi(nextX) + nextX)
    while |subsequentX - nextX| > accuracy
        nextX ← subsequentX
        subsequentX ← (nextX*phi(phi(nextX)) - phi(nextX)^2)/(phi(phi(nextX)) - 2*phi(nextX) + nextX)
        n ← n + 1
    [subsequentX; n]
resultSteffensenMforSIM := SteffensenMethodForSIM(phi, initialApproximationX, accuracy)
resultSteffensenMforSIM = [1.87265; 1]
xSteffensenMforSIM := 1.873
f(xSteffensenMforSIM) = 0.00108285
# Метод Ньютона:
derivativeF(x) := d/dx(f(x))
NewtonMethod(f, derivativeF, initialApproximationX, accuracy) :=
    n ← 0
    nextX ← initialApproximationX
    subsequentX ← nextX - f(nextX)/derivativeF(nextX)
    while |subsequentX - nextX| > accuracy
        nextX ← subsequentX
        subsequentX ← nextX - f(nextX)/derivativeF(nextX)
        n ← n + 1
    [subsequentX; n]
resultNM := NewtonMethod(f, derivativeF, initialApproximationX, accuracy)
resultNM = [1.87265; 2]
xNM := 1.873
f(xNM) = 0.00108285
# Метод секущих как видоизменение метода Ньютона:
SecantMethodForNM(f, initialApproximationX, accuracy) :=
    n ← 0
    nextX ← initialApproximationX
    subsequentX ← nextX - accuracy
    while |subsequentX - nextX| > accuracy
        initialApproximationX ← nextX
        nextX ← subsequentX
        subsequentX ← nextX - f(nextX)*(nextX - initialApproximationX)/(f(nextX) - f(initialApproximationX))
        n ← n + 1
    [subsequentX; n]
resultSecantMforNM := SecantMethodForNM(f, initialApproximationX, accuracy)
resultSecantMforNM = [1.87265; 3]
xSecantMforNM := 1.873
f(xSecantMforNM) = 0.00108285
# Видоизменение метода Ньютона с постоянным значением производной:
NewtonWithConstantDerivativeMethod(f, derivativeF, initialApproximationX, accuracy) :=
    n ← 0
    nextX ← initialApproximationX
    subsequentX ← nextX - f(nextX)/derivativeF(initialApproximationX)
    while |subsequentX - nextX| > accuracy
        nextX ← subsequentX
        subsequentX ← nextX - f(nextX)/derivativeF(initialApproximationX)
        n ← n + 1
    [subsequentX; n]
resultNWCDM := NewtonWithConstantDerivativeMethod(f, derivativeF, initialApproximationX, accuracy)
resultNWCDM = [1.87265; 2]
xNWCDM := 1.873
f(xNWCDM) = 0.00108285
