# Лабораторная работа 1.2. Метод Лобачевского при решении алгебраических уравнений
# Исходные данные:
P(x) := x^3 + 0.75*x^2 - 5.1*x + 3.1
polynomialCoefficients := [1, 0.75, -5.1, 3.1]
m := length(transpose(polynomialCoefficients)) - 1
stepsNumber := 9
accuracy := 10^-3
Zero(i, j) := 0
# Функция квадрирования коэффициентов исходного уравнения:
TableQuadrature(polynomialCoefficients, n) :=
    m ← length(transpose(polynomialCoefficients)) - 1
    Table ← matrix(n, m, Zero)
    for k ∈ 0 .. m
        Table[0, k] ← transpose(polynomialCoefficients)[k]
    for i ∈ 1 .. n
        for k ∈ 0 .. m
            Table[i, k] ← Table[i - 1, k]^2 if (k == 0) or (k == m)
            Table[i, k] ← Table[i - 1, k]^2 - 2*Table[i - 1, k - 1]*Table[i - 1, k + 1] otherwise
    Table
TableCoefficients := TableQuadrature(polynomialCoefficients, stepsNumber)
# По таблице мы видим, что в процессе квадрирования коэффициенты не меняют своего знака,
# значит, все корни вещественные
TableCoefficients = [
    1, 0.75, -5.1, 3.1;
    1, 10.7625, 21.36, 9.61;
    1, 0, 0, 92.3521;
    1, 0, 0, 0;
    1, 0, 0, 0;
    1, 0, 0, 0;
    1, 0, 0, 0;
    1, 0, 0, 0;
    1, 0, 0, 0;
    1, 0, 3.1656e299, 0
]
# Вычисление значения функции уравнения через коэффициенты по схеме Горнера:
functionValue(x, polynomialCoefficients) :=
    m ← length(transpose(polynomialCoefficients)) - 1
    valueX ← transpose(polynomialCoefficients)[0]
    for k ∈ 1 .. m
        valueX ← x*valueX + transpose(polynomialCoefficients)[k]
    valueX
# Выбираем последнюю строку таблицы:
QuadratureCoefficients := submatrix(TableCoefficients, stepsNumber, stepsNumber, 0, m)
QuadratureCoefficients = [1, 0, 3.1656e299, 0]
# Вычислим действительные корни:
RealRoots(QuadratureCoefficients) :=
    m ← length(transpose(polynomialCoefficients)) - 1
    for k ∈ 1 .. m
        x[k] ← nthroot(|transpose(QuadratureCoefficients)[k]|/|transpose(QuadratureCoefficients)[k - 1]|, 2^stepsNumber)
        x[k] ← -x[k] if |functionValue(x[k], polynomialCoefficients)| > accuracy
    x
RealRoots(QuadratureCoefficients) = [0; -2.88779; 1.33167; 0.80612]
# Подставим найденные корни в полином:
P(RealRoots(QuadratureCoefficients)[1, 0]) = 5.77316e-15
P(RealRoots(QuadratureCoefficients)[2, 0]) = 4.44089e-16
P(RealRoots(QuadratureCoefficients)[3, 0]) = 4.44089e-16
# Таким образом, полином имеет следующие корни:
x1 := RealRoots(QuadratureCoefficients)[1, 0] = -2.88779
x2 := RealRoots(QuadratureCoefficients)[2, 0] = 1.33167
x3 := RealRoots(QuadratureCoefficients)[3, 0] = 0.80612
