# Лабораторная работа 1.3. Решение систем нелинейных уравнений
# Исходные данные для метода простых итераций:
sin(x + 0.5) - 3*y == 1
cos(y + 2) + 2*x == 0
f1SIM(x, y) := sin(x + 0.5) - 3*y - 1
f2SIM(x, y) := cos(y + 2) + 2*x
accuracy := 0.5*10^-4
# Определим начальное приближение графическим методом:
y1SIM(x) := (sin(x + 0.5) - 1)/3
y2SIM(x) := acos(-2*x) - 2
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# За начальное приближение примем точку перечечения графиков:
x0SIM := 0.148
y0SIM := -0.132
# Определим облась, в которой ищется решение:
δSIM := 0.5
x0SIM - δSIM = -0.352
x0SIM + δSIM = 0.648
y0SIM - δSIM = -0.632
y0SIM + δSIM = 0.368
ΩSIM := ((-0.352, 0.648), (-0.632, 0.368))
# Для заданной системы уравнений возможно записать две канонические формы:
# Первая каноническая форма: | Вторая каноническая форма:
ψ1SIM(x, y) := -cos(y + 2)/2
ϕ1SIM(x, y) := asin(1 - 3*y) - 0.5
ϕ2SIM(x, y) := acos(-2*x) - 2
ψ2SIM(x, y) := (sin(x + 0.5) - 1)/3
# Проверим выполнение условий сходимости метода:
# Функции должны быть определены и непрерывно дифференцируемы в области Ω:
d/dx(ϕ1SIM(x, y)) → 0
d/dx(ψ1SIM(x, y)) → 0
d/dy(ϕ1SIM(x, y)) → -3/sqrt(1 - (3*y - 1)^2)
d/dy(ψ1SIM(x, y)) → sin(y + 2)/2
d/dx(ψ2SIM(x, y)) → cos(x + 0.5)/3
d/dx(ϕ2SIM(x, y)) → 2/sqrt(1 - 4*x^2)
d/dy(ψ2SIM(x, y)) → 0
d/dy(ϕ2SIM(x, y)) → 0
# Для первой канонической формы подкоренные выражения принимают отрицательные значения, поэтому такую формы мы рассматривать не будем
P1SIM(y) := d/dy(ψ1SIM(x, y)) → sin(y + 2)/2
P2SIM(x) := d/dx(ψ2SIM(x, y)) → cos(x + 0.5)/3
# Проверим справедливость неравенства:
q := max(d/dx0SIM(ψ1SIM(x0SIM, y0SIM)) + d/dy0SIM(ψ1SIM(x0SIM, y0SIM)), d/dx0SIM(ψ2SIM(x0SIM, y0SIM)) + d/dy0SIM(ψ2SIM(x0SIM, y0SIM)))
q = 0.47808
# Неравенство q < 1 выполнено
# Проверим выполнение следующих условий для начального прближения:
mSIM := max(|x0SIM - ψ1SIM(x0SIM, y0SIM)|, |y0SIM - ψ2SIM(x0SIM, y0SIM)|)
mSIM = 0.00157619
mSIM/(1 - q) = 0.00301998
# Неравенство mSIM/(1-q) < δSIM = 0.5 соблюдено
# Так как все условия теоремы выполнены, то метод простых итераций сходится, и тогда получаем следующие начальные условия:
x0SIMnew := 0.8
y0SIMnew := -0.6
# Метод простых итераций для систем нелинейных уравнений:
SimpleIterationMethod(accuracy) :=
    n ← 0
    x0SIMnew ← 0.8
    y0SIMnew ← -0.6
    x ← 0
    y ← 0
    while max(|x - x0SIMnew|, |y - y0SIMnew|) > accuracy
        x0SIMnew ← x
        y0SIMnew ← y
        x ← ψ1SIM(x0SIMnew, y0SIMnew)
        y ← ψ2SIM(x0SIMnew, y0SIMnew)
        n ← n + 1
    [x; y; n]
SimpleIterationMethod(accuracy) = [0.146115; -0.132631; 10]
# Исходные данные для метода Ньютона:
f1NM(x, y) := sin(x + 0.5) - 3*y - 1
f2NM(x, y) := cos(y + 2) + 2*x
x0NM := 0.148
y0NM := -0.132
ΩNM := ((-0.352, 0.648), (-0.632, 0.368))
# Проверим выполнение условий сходимости метода:
# Функции определены и дважды непрерывно дифференцируемы в области Ω:
d/dx(f2NM(x, y)) → 2
d/dx(f1NM(x, y)) → cos(x + 0.5)
d/dy(f1NM(x, y)) → -3
d/dy(f2NM(x, y)) → -sin(y + 2)
d^2/dx^2(f1NM(x, y)) → -sin(x + 0.5)
d^2/dx^2(f2NM(x, y)) → 0
d^2/dy^2(f1NM(x, y)) → 0
d^2/dy^2(f2NM(x, y)) → -cos(y + 2)
# Для вторых производных в области Ω долно выполняться неравенство:
K := max(d/dx0NM(f1NM(x0NM, y0NM)), d/dy0NM(f2NM(x0NM, y0NM))) = 0.797293
# Значения x0NM и y0NM образуют приближённое решение системы, и для них должно выполняться условие:
f1NM(x0NM, y0NM) = -0.000406971
f2NM(x0NM, y0NM) = 0.00315238
η := max(f1NM(x0NM, y0NM), f2NM(x0NM, y0NM)) = 0.00315238
# Матрица Якоби:
matrixJacobi1(x, y) := [f1NM(x, y), d/dy(f1NM(x, y)); f2NM(x, y), d/dy(f2NM(x, y))] → [sin(x + 0.5) - 3*y - 1, -3; 2*x + cos(y + 2), -sin(y + 2)]
matrixJacobi(x, y) := [d/dx(f1NM(x, y)), d/dy(f1NM(x, y)); d/dx(f2NM(x, y)), d/dy(f2NM(x, y))] → [cos(x + 0.5), -3; 2, -sin(y + 2)]
matrixJacobi2(x, y) := [d/dx(f1NM(x, y)), f1NM(x, y); d/dx(f2NM(x, y)), f2NM(x, y)] → [cos(x + 0.5), sin(x + 0.5) - 3*y - 1; 2, 2*x + cos(y + 2)]
matrixJacobi(x0NM, y0NM) = [0.797293, -3; 2, -0.956159]
determinantJacobi := |matrixJacobi(x0NM, y0NM)| = 5.23766
# Определитель отличен от нуля, значит:
B := max(1/determinantJacobi*(matrixJacobi(x0NM, y0NM)[0, 0] + matrixJacobi(x0NM, y0NM)[0, 1]), 1/determinantJacobi*(matrixJacobi(x0NM, y0NM)[1, 0] + matrixJacobi(x0NM, y0NM)[1, 1]))
B = 0.199295
# Для чисел K, η, B должно выполняться условие h < 1/2:
h := B^2*K*η = 9.98274e-5
# Для δNM должно выполняться неравенство δNM < 0.5:
(1 - sqrt(1 - 2*h))/h*B*η = 0.000628285
# Так как все условия теоремы выполнены, то метод Ньютона сходится
# Метод Ньютона для систем нелинейных уравнений:
NewtonMethod(accuracy) :=
    n ← 0
    x ← 0
    y ← 0
    while max(|x - x0NM|, |y - y0NM|) > accuracy
        x0NM ← x
        y0NM ← y
        x ← x0NM - |matrixJacobi1(x0NM, y0NM)|/|matrixJacobi(x0NM, y0NM)|
        y ← y0NM - |matrixJacobi2(x0NM, y0NM)|/|matrixJacobi(x0NM, y0NM)|
        n ← n + 1
    [x; y; n]
NewtonMethod(accuracy) = [0.14612; -0.132636; 3]
