# Лабораторная работа 2.1. Вычисление собственных векторов и собственных значений матриц
# Общие функции для всех методов:
# Исходные данные: | Необходимо задать единичную матрицу:
initialMatrix := [9.31, 0.52, 0.48, -0.17; 0.52, 5.31, 0.11, 0.38; 0.48, 0.11, 3.41, -0.17; -0.17, 0.38, -0.17, 1.89]
matrixE := identity(rank(initialMatrix)) = [1, 0, 0, 0; 0, 1, 0, 0; 0, 0, 1, 0; 0, 0, 0, 1]
# Функция нормировки по последней компоненте:
initialValues := [-1.68; -3.9; -4.2; 7.35]
RationingVectors(vector) :=
    k ← rows(vector) - 1
    for i ∈ 0 .. k
        vector[i, 0] ← vector[i, 0]/vector[k, 0]
    return vector
n := rank(initialMatrix) = 4
matrixE = [1, 0, 0, 0; 0, 1, 0, 0; 0, 0, 1, 0; 0, 0, 0, 1]
# Функия проверки собственных векторов:
# Метод Данилевского:
VerifyEigenVectors(λ, vector) :=
    checkVectors ← (initialMatrix - λ*matrixE)*vector
    checkVectors
equalMatrix(temp) := [0, 0, 0, temp[0, n - 1]; 1, 0, 0, temp[1, n - 1]; 0, 1, 0, temp[2, n - 1]; 0, 0, 1, temp[3, n - 1]]
DanilevskyMethod :=
    previousMatrix ← initialMatrix
    nextMatrix ← equalMatrix(previousMatrix)^-1*previousMatrix*equalMatrix(previousMatrix)
    similarityTransformationMatrixS ← equalMatrix(previousMatrix)
    k ← 1
    while k < n + 5
        previousMatrix ← nextMatrix
        nextMatrix ← equalMatrix(previousMatrix)^-1*previousMatrix*equalMatrix(previousMatrix)
        similarityTransformationMatrixS ← similarityTransformationMatrixS*equalMatrix(previousMatrix)
        k ← k + 1
    [nextMatrix; similarityTransformationMatrixS]
Frobenius := DanilevskyMethod[0, 0] = [0, 0, 0, -307.773; 1, 0, 0, 350.498; 0, 1, 0, -132.652; 0, 0, 1, 19.92]
# Найдём собственные значения:
Given
# Собственный многочлен:
λ^4 - Frobenius[3, 3]*λ^3 - Frobenius[2, 3]*λ^2 - Frobenius[1, 3]*λ - Frobenius[0, 3] == 0
# Собственные значения:
eigenValuesDanilevsky := Find(λ) → [9.41886387708, 5.29061960557, 3.38698911561, 1.82352740174]
# Проверим найденные собственные значения:
eigenvals(initialMatrix) = [1.82353; 3.38699; 5.29062; 9.41886]
# Найдём собственные векторы и займёмся их нормировкой путём деления на последнюю компоненту:
eigenVectorsDanilevsky(λ) := transpose([λ^3 - Frobenius[3, 3]*λ^2 - Frobenius[2, 3]*λ - Frobenius[1, 3], λ^2 - Frobenius[3, 3]*λ - Frobenius[2, 3], λ - Frobenius[3, 3], 1])
x1Danilevsky := RationingVectors(DanilevskyMethod[1, 0]*eigenVectorsDanilevsky(eigenValuesDanilevsky[0, 0])) = [-55.4558; -7.04857; -4.58725; 1]
VerifyEigenVectors(eigenValuesDanilevsky[0, 0], x1Danilevsky) = [4.8575e-13; 1.34781e-13; -1.97259e-13; -1.26388e-12]
x2Danilevsky := RationingVectors(DanilevskyMethod[1, 0]*eigenVectorsDanilevsky(eigenValuesDanilevsky[0, 1])) = [-1.07681; 8.527; 0.133519; 1]
VerifyEigenVectors(eigenValuesDanilevsky[0, 1], x2Danilevsky) = [9.63285e-13; -3.33067e-14; 1.26427e-13; -2.05169e-13]
x3Danilevsky := RationingVectors(DanilevskyMethod[1, 0]*eigenVectorsDanilevsky(eigenValuesDanilevsky[0, 2])) = [0.771014; 0.125651; -9.29596; 1]
VerifyEigenVectors(eigenValuesDanilevsky[0, 2], x3Danilevsky) = [-7.17356e-11; 6.0385e-13; -6.06176e-12; 2.59015e-12]
x4Danilevsky := RationingVectors(DanilevskyMethod[1, 0]*eigenVectorsDanilevsky(eigenValuesDanilevsky[0, 3])) = [0.0238383; -0.115955; 0.107983; 1]
VerifyEigenVectors(eigenValuesDanilevsky[0, 3], x4Danilevsky) = [2.57992e-11; 1.88294e-13; 2.09929e-12; -8.33861e-13]
# Метод Фаддеева:
FaddeevMethod(k) :=
    step ← 1
    newInitialMatrix ← initialMatrix
    q ← tr(newInitialMatrix)
    matrixB ← newInitialMatrix - q*matrixE
    while step < k
        step ← step + 1
        newInitialMatrix ← initialMatrix*matrixB
        q ← tr(newInitialMatrix)/step
        matrixB ← newInitialMatrix - q*matrixE
    return [q; matrixB]
# Найдём собственные значения:
Given
# Собственный многочлен:
λ^4 - FaddeevMethod(1)[0]*λ^3 - FaddeevMethod(2)[0]*λ^2 - FaddeevMethod(3)[0]*λ - FaddeevMethod(4)[0] == 0
# Собственные значения:
eigenValuesFaddeev := Find(λ) → [9.41886387708, 5.29061960557, 3.38698911561, 1.82352740174]
# Проверим найденные собственные значения:
eigenvals(initialMatrix) = [1.82353; 3.38699; 5.29062; 9.41886]
# Найдём собственные векторы и займёмся их нормировкой путём деления на последнюю компоненту:
Q(λ) := λ^(n - 1)*[1, 0, 0, 0; 0, 1, 0, 0; 0, 0, 1, 0; 0, 0, 0, 1] + λ^(n - 2)*FaddeevMethod(1)[1] + λ^(n - 3)*FaddeevMethod(2)[1] + FaddeevMethod(3)[1]
x1Faddeev := RationingVectors(Q(eigenValuesFaddeev[0, 0])[:, 0]) = [-55.4558; -7.04857; -4.58725; 1]
VerifyEigenVectors(eigenValuesFaddeev[0, 0], x1Faddeev) = [1.69309e-15; 2.16493e-14; 1.23512e-14; 4.44089e-15]
x2Faddeev := RationingVectors(Q(eigenValuesFaddeev[0, 1])[:, 0]) = [-1.07681; 8.527; 0.133519; 1]
VerifyEigenVectors(eigenValuesFaddeev[0, 1], x2Faddeev) = [-1.65776e-12; -2.14995e-13; -1.62564e-13; 2.26485e-14]
x3Faddeev := RationingVectors(Q(eigenValuesFaddeev[0, 2])[:, 0]) = [0.771014; 0.125651; -9.29596; 1]
VerifyEigenVectors(eigenValuesFaddeev[0, 2], x3Faddeev) = [-3.55013e-12; -4.33209e-13; -2.95125e-13; 4.19664e-14]
x4Faddeev := RationingVectors(Q(eigenValuesFaddeev[0, 3])[:, 0]) = [0.0238383; -0.115955; 0.107983; 1]
VerifyEigenVectors(eigenValuesFaddeev[0, 3], x4Faddeev) = [4.94438e-13; 6.94445e-14; 4.67126e-14; -8.88178e-15]
# Метод Крылова:
# Построим векторы Крылова:
initialKrylovVector := [1; 0; 0; 0]
KrylovVectors(k) :=
    krylovVector ← initialMatrix^k*initialKrylovVector
    krylovVector
Given
KrylovVectors(n - 1)[0, 0]*X1 + KrylovVectors(n - 2)[0, 0]*X2 + KrylovVectors(n - 3)[0, 0]*X3 + initialKrylovVector[0, 0]*X4 == KrylovVectors(n)[0, 0]
KrylovVectors(n - 1)[1, 0]*X1 + KrylovVectors(n - 2)[1, 0]*X2 + KrylovVectors(n - 3)[1, 0]*X3 + initialKrylovVector[1, 0]*X4 == KrylovVectors(n)[1, 0]
KrylovVectors(n - 1)[2, 0]*X1 + KrylovVectors(n - 2)[2, 0]*X2 + KrylovVectors(n - 3)[2, 0]*X3 + initialKrylovVector[2, 0]*X4 == KrylovVectors(n)[2, 0]
KrylovVectors(n - 1)[3, 0]*X1 + KrylovVectors(n - 2)[3, 0]*X2 + KrylovVectors(n - 3)[3, 0]*X3 + initialKrylovVector[3, 0]*X4 == KrylovVectors(n)[3, 0]
Q := Find(X1, X2, X3, X4) → [19.92; -132.6519; 350.498214; -307.77344955]
# Найдём собственные значения:
Given
# Собственный многочлен:
λ^4 - Q[0, 0]*λ^3 - Q[1, 0]*λ^2 - Q[2, 0]*λ - Q[3, 0] == 0
# Собственные значения:
eigenValuesKrylov := Find(λ) → [9.41886387708, 5.29061960557, 3.38698911561, 1.82352740174]
# Проверим найденные собственные значения:
eigenvals(initialMatrix) = [1.82353; 3.38699; 5.29062; 9.41886]
# Определим коэффициенты:
β1(i) := 1
β2(i) := eigenValuesKrylov[0, i] - Q[0, 0]
β3(i) := eigenValuesKrylov[0, i]^2 - Q[0, 0]*eigenValuesKrylov[0, i] - Q[1, 0]
β4(i) := eigenValuesKrylov[0, i]^3 - Q[0, 0]*eigenValuesKrylov[0, i]^2 - Q[1, 0]*eigenValuesKrylov[0, i] - Q[2, 0]
# Найдём собственные векторы и займёмся их нормировкой путём деления на последнюю компоненту:
x1Krylov := RationingVectors(β1(0)*KrylovVectors(n - 1) + β2(0)*KrylovVectors(n - 2) + β3(0)*KrylovVectors(n - 3) + β4(0)*initialKrylovVector) = [-55.4558; -7.04857; -4.58725; 1]
VerifyEigenVectors(eigenValuesKrylov[0, 0], x1Krylov) = [1.249e-15; 2.20934e-14; 8.79852e-15; -8.88178e-16]
x2Krylov := RationingVectors(β1(1)*KrylovVectors(n - 1) + β2(1)*KrylovVectors(n - 2) + β3(1)*KrylovVectors(n - 3) + β4(1)*initialKrylovVector) = [-1.07681; 8.527; 0.133519; 1]
VerifyEigenVectors(eigenValuesKrylov[0, 1], x2Krylov) = [-1.93154e-12; -2.54574e-13; -2.148e-13; 7.23865e-14]
x3Krylov := RationingVectors(β1(2)*KrylovVectors(n - 1) + β2(2)*KrylovVectors(n - 2) + β3(2)*KrylovVectors(n - 3) + β4(2)*initialKrylovVector) = [0.771014; 0.125651; -9.29596; 1]
VerifyEigenVectors(eigenValuesKrylov[0, 2], x3Krylov) = [4.00294e-12; 3.26073e-13; 3.25323e-13; -1.0969e-13]
x4Krylov := RationingVectors(β1(3)*KrylovVectors(n - 1) + β2(3)*KrylovVectors(n - 2) + β3(3)*KrylovVectors(n - 3) + β4(3)*initialKrylovVector) = [0.0238383; -0.115955; 0.107983; 1]
VerifyEigenVectors(eigenValuesKrylov[0, 3], x4Krylov) = [-9.66283e-13; -9.07052e-14; -6.98608e-14; 1.99563e-14]
# Метод Леверье:
# След матрицы:
TraceMatrix(k) := tr(initialMatrix^k)
# Коэффициенты:
p1 := TraceMatrix(1)
p2 := 1/2*(TraceMatrix(2) - TraceMatrix(1)*p1)
p3 := 1/3*(TraceMatrix(3) - TraceMatrix(2)*p1 - TraceMatrix(1)*p2)
p4 := 1/4*(TraceMatrix(4) - TraceMatrix(3)*p1 - TraceMatrix(2)*p2 - TraceMatrix(1)*p3)
# Найдём собственные значения:
Given
# Собственный многочлен:
λ^4 - p1*λ^3 - p2*λ^2 - p3*λ - p4 == 0
# Собственные значения:
eigenValuesLeverrier := Find(λ) → [9.41886387708, 5.29061960557, 3.38698911561, 1.82352740174]
# Проверим найденные собственные значения:
eigenvals(initialMatrix) = [1.82353; 3.38699; 5.29062; 9.41886]
# Найдём собственные векторы и займёмся их нормировкой путём деления на последнюю компоненту:
AuxiliaryLeverrierMatrix(λ) := initialMatrix - λ*[1, 0, 0, 0; 0, 1, 0, 0; 0, 0, 1, 0; 0, 0, 0, 1]
# Первый собственный вектор:
Given
AuxiliaryLeverrierMatrix(eigenValuesLeverrier[0, 0])[0, 0]*X1 + AuxiliaryLeverrierMatrix(eigenValuesLeverrier[0, 0])[0, 1]*X2 + AuxiliaryLeverrierMatrix(eigenValuesLeverrier[0, 0])[0, 2]*X3 + AuxiliaryLeverrierMatrix(eigenValuesLeverrier[0, 0])[0, 3]*X4 == 0.1*10^-15
AuxiliaryLeverrierMatrix(eigenValuesLeverrier[0, 0])[1, 0]*X1 + AuxiliaryLeverrierMatrix(eigenValuesLeverrier[0, 0])[1, 1]*X2 + AuxiliaryLeverrierMatrix(eigenValuesLeverrier[0, 0])[1, 2]*X3 + AuxiliaryLeverrierMatrix(eigenValuesLeverrier[0, 0])[1, 3]*X4 == 0.1*10^-15
AuxiliaryLeverrierMatrix(eigenValuesLeverrier[0, 0])[2, 0]*X1 + AuxiliaryLeverrierMatrix(eigenValuesLeverrier[0, 0])[2, 1]*X2 + AuxiliaryLeverrierMatrix(eigenValuesLeverrier[0, 0])[2, 2]*X3 + AuxiliaryLeverrierMatrix(eigenValuesLeverrier[0, 0])[2, 3]*X4 == 0.1*10^-15
AuxiliaryLeverrierMatrix(eigenValuesLeverrier[0, 0])[3, 0]*X1 + AuxiliaryLeverrierMatrix(eigenValuesLeverrier[0, 0])[3, 1]*X2 + AuxiliaryLeverrierMatrix(eigenValuesLeverrier[0, 0])[3, 2]*X3 + AuxiliaryLeverrierMatrix(eigenValuesLeverrier[0, 0])[3, 3]*X4 == 0.1*10^-15
firstEigenVectorLeverrier := Find(X1, X2, X3, X4) → [-4725.97040292; -600.682549209; -390.927203486; 85.2204575439]
firstEigenVectorLeverrier = [-4725.97; -600.683; -390.927; 85.2205]
VerifyEigenVectors(eigenValuesLeverrier[0, 0], RationingVectors(firstEigenVectorLeverrier)) = [3.91354e-15; 1.15463e-14; 5.2458e-15; -1.77636e-15]
# Второй собственный вектор:
Given
AuxiliaryLeverrierMatrix(eigenValuesLeverrier[0, 1])[0, 0]*X1 + AuxiliaryLeverrierMatrix(eigenValuesLeverrier[0, 1])[0, 1]*X2 + AuxiliaryLeverrierMatrix(eigenValuesLeverrier[0, 1])[0, 2]*X3 + AuxiliaryLeverrierMatrix(eigenValuesLeverrier[0, 1])[0, 3]*X4 == 0.1*10^-15
AuxiliaryLeverrierMatrix(eigenValuesLeverrier[0, 1])[1, 0]*X1 + AuxiliaryLeverrierMatrix(eigenValuesLeverrier[0, 1])[1, 1]*X2 + AuxiliaryLeverrierMatrix(eigenValuesLeverrier[0, 1])[1, 2]*X3 + AuxiliaryLeverrierMatrix(eigenValuesLeverrier[0, 1])[1, 3]*X4 == 0.1*10^-15
AuxiliaryLeverrierMatrix(eigenValuesLeverrier[0, 1])[2, 0]*X1 + AuxiliaryLeverrierMatrix(eigenValuesLeverrier[0, 1])[2, 1]*X2 + AuxiliaryLeverrierMatrix(eigenValuesLeverrier[0, 1])[2, 2]*X3 + AuxiliaryLeverrierMatrix(eigenValuesLeverrier[0, 1])[2, 3]*X4 == 0.1*10^-15
AuxiliaryLeverrierMatrix(eigenValuesLeverrier[0, 1])[3, 0]*X1 + AuxiliaryLeverrierMatrix(eigenValuesLeverrier[0, 1])[3, 1]*X2 + AuxiliaryLeverrierMatrix(eigenValuesLeverrier[0, 1])[3, 2]*X3 + AuxiliaryLeverrierMatrix(eigenValuesLeverrier[0, 1])[3, 3]*X4 == 0.1*10^-15
secondEigenVectorLeverrier := Find(X1, X2, X3, X4) → [-281.315642636; 2227.66069268; 34.8815988817; 261.247935288]
secondEigenVectorLeverrier = [-281.316; 2227.66; 34.8816; 261.248]
VerifyEigenVectors(eigenValuesLeverrier[0, 1], RationingVectors(secondEigenVectorLeverrier)) = [9.4369e-16; -5.38458e-15; 1.94289e-16; 0]
# Третий собственный вектор:
Given
AuxiliaryLeverrierMatrix(eigenValuesLeverrier[0, 2])[0, 0]*X1 + AuxiliaryLeverrierMatrix(eigenValuesLeverrier[0, 2])[0, 1]*X2 + AuxiliaryLeverrierMatrix(eigenValuesLeverrier[0, 2])[0, 2]*X3 + AuxiliaryLeverrierMatrix(eigenValuesLeverrier[0, 2])[0, 3]*X4 == 0.1*10^-15
AuxiliaryLeverrierMatrix(eigenValuesLeverrier[0, 2])[1, 0]*X1 + AuxiliaryLeverrierMatrix(eigenValuesLeverrier[0, 2])[1, 1]*X2 + AuxiliaryLeverrierMatrix(eigenValuesLeverrier[0, 2])[1, 2]*X3 + AuxiliaryLeverrierMatrix(eigenValuesLeverrier[0, 2])[1, 3]*X4 == 0.1*10^-15
AuxiliaryLeverrierMatrix(eigenValuesLeverrier[0, 2])[2, 0]*X1 + AuxiliaryLeverrierMatrix(eigenValuesLeverrier[0, 2])[2, 1]*X2 + AuxiliaryLeverrierMatrix(eigenValuesLeverrier[0, 2])[2, 2]*X3 + AuxiliaryLeverrierMatrix(eigenValuesLeverrier[0, 2])[2, 3]*X4 == 0.1*10^-15
AuxiliaryLeverrierMatrix(eigenValuesLeverrier[0, 2])[3, 0]*X1 + AuxiliaryLeverrierMatrix(eigenValuesLeverrier[0, 2])[3, 1]*X2 + AuxiliaryLeverrierMatrix(eigenValuesLeverrier[0, 2])[3, 2]*X3 + AuxiliaryLeverrierMatrix(eigenValuesLeverrier[0, 2])[3, 3]*X4 == 0.1*10^-15
thirdEigenVectorLeverrier := Find(X1, X2, X3, X4) → [417.84731989; 68.0961193526; -5037.90318078; 541.945170641]
thirdEigenVectorLeverrier = [417.847; 68.0961; -5037.9; 541.945]
VerifyEigenVectors(eigenValuesLeverrier[0, 2], RationingVectors(thirdEigenVectorLeverrier)) = [-8.32667e-17; 1.11022e-16; 6.66134e-16; -6.66134e-16]
# Четвёртый собственный вектор:
Given
AuxiliaryLeverrierMatrix(eigenValuesLeverrier[0, 3])[0, 0]*X1 + AuxiliaryLeverrierMatrix(eigenValuesLeverrier[0, 3])[0, 1]*X2 + AuxiliaryLeverrierMatrix(eigenValuesLeverrier[0, 3])[0, 2]*X3 + AuxiliaryLeverrierMatrix(eigenValuesLeverrier[0, 3])[0, 3]*X4 == 0.1*10^-15
AuxiliaryLeverrierMatrix(eigenValuesLeverrier[0, 3])[1, 0]*X1 + AuxiliaryLeverrierMatrix(eigenValuesLeverrier[0, 3])[1, 1]*X2 + AuxiliaryLeverrierMatrix(eigenValuesLeverrier[0, 3])[1, 2]*X3 + AuxiliaryLeverrierMatrix(eigenValuesLeverrier[0, 3])[1, 3]*X4 == 0.1*10^-15
AuxiliaryLeverrierMatrix(eigenValuesLeverrier[0, 3])[2, 0]*X1 + AuxiliaryLeverrierMatrix(eigenValuesLeverrier[0, 3])[2, 1]*X2 + AuxiliaryLeverrierMatrix(eigenValuesLeverrier[0, 3])[2, 2]*X3 + AuxiliaryLeverrierMatrix(eigenValuesLeverrier[0, 3])[2, 3]*X4 == 0.1*10^-15
AuxiliaryLeverrierMatrix(eigenValuesLeverrier[0, 3])[3, 0]*X1 + AuxiliaryLeverrierMatrix(eigenValuesLeverrier[0, 3])[3, 1]*X2 + AuxiliaryLeverrierMatrix(eigenValuesLeverrier[0, 3])[3, 2]*X3 + AuxiliaryLeverrierMatrix(eigenValuesLeverrier[0, 3])[3, 3]*X4 == 0.1*10^-15
fourthEigenVectorLeverrier := Find(X1, X2, X3, X4) → [-634.502700054; 3086.37203866; -2874.19069446; -26616.9714748]
fourthEigenVectorLeverrier = [-634.503; 3086.37; -2874.19; -26617]
VerifyEigenVectors(eigenValuesLeverrier[0, 3], RationingVectors(fourthEigenVectorLeverrier)) = [0; 5.55112e-17; 2.77556e-17; -9.71445e-17]
# Степенной метод:
# Данный метод служит для вычисления наибольшего по модулю собственной значения, и, следоваетльно, отыскиваемый собственный вектор будет принадлежать этому максимальному значению
accuracyPowerLawMethod := 5*10^-20
PowerLawMethod :=
    initialVectorY ← [1; 1; 1; 1]
    k ← 1
    vectorY(k) ← initialMatrix^k*initialVectorY
    while |vectorY(k + 1)[0, 0]/vectorY(k)[0, 0] - vectorY(k)[0, 0]/vectorY(k - 1)[0, 0]| > accuracyPowerLawMethod
        k ← k + 1
    [vectorY(k + 1)[0, 0]/vectorY(k)[0, 0]; vectorY(k)]
# Найдём максимальное по модулю собственное значение:
PowerLawMethod[0, 0] = 9.41886
# Проверим найденное собственное значение:
eigenvals(initialMatrix) = [1.82353; 3.38699; 5.29062; 9.41886]
# Найдём собственный вектор и займёмся его нормировкой путём деления на последнюю компоненту:
RationingVectors(PowerLawMethod[1, 0]) = [-55.4558; -7.04857; -4.58725; 1]
VerifyEigenVectors(PowerLawMethod[0, 0], RationingVectors(PowerLawMethod[1, 0])) = [-4.52416e-15; 7.4718e-14; 5.2458e-15; 6.21725e-15]
# Метод вращений:
# Функция для отыскания суммы квадратов недиагональных элементов матрицы:
AverageDiagonalElements(matrix) :=
    average ← 0
    for i ∈ 0 .. n - 1
        for k ∈ 0 .. n - 1
            average ← average + |matrix[i, k]|^2 if i ≠ k
    average
# Функция для отыскания максимального по модулю недиагонального элемента матрицы и его индексов
GetMaximumElement(matrix) :=
    maximumElement ← |matrix[0, 1]|
    for i ∈ 0 .. n - 2
        for k ∈ 1 .. n - 1
            if i ≠ k and |matrix[i, k]| ≥ maximumElement
                necessaryIndexI ← i
                necessaryIndexK ← k
                maximumElement ← |matrix[i, k]|
    [necessaryIndexI; necessaryIndexK]
# Функция для построения матрицы вращения:
BuildRotationMatrix(i, k, φ) :=
    rotationMatrix ← [1, 0, 0, 0; 0, 1, 0, 0; 0, 0, 1, 0; 0, 0, 0, 1]
    rotationMatrix[i, i] ← cos(φ)
    rotationMatrix[i, k] ← -sin(φ)
    rotationMatrix[k, i] ← sin(φ)
    rotationMatrix[k, k] ← cos(φ)
    rotationMatrix
accuracyRotationMethod := 5*10^-20
RotationMethod :=
    previousMatrix ← initialMatrix
    φ ← 0.5*atan(2*previousMatrix[GetMaximumElement(previousMatrix)[0, 0], GetMaximumElement(previousMatrix)[1, 0]]/(previousMatrix[GetMaximumElement(previousMatrix)[0, 0], GetMaximumElement(previousMatrix)[0, 0]] - previousMatrix[GetMaximumElement(previousMatrix)[1, 0], GetMaximumElement(previousMatrix)[1, 0]]))
    nextMatrix ← transpose(BuildRotationMatrix(GetMaximumElement(previousMatrix)[0, 0], GetMaximumElement(previousMatrix)[1, 0], φ))*previousMatrix*BuildRotationMatrix(GetMaximumElement(previousMatrix)[0, 0], GetMaximumElement(previousMatrix)[1, 0], φ)
    rotationMatrix ← BuildRotationMatrix(GetMaximumElement(previousMatrix)[0, 0], GetMaximumElement(previousMatrix)[1, 0], φ)
    while AverageDiagonalElements(nextMatrix) > accuracyRotationMethod
        previousMatrix ← nextMatrix
        φ ← 0.5*atan(2*previousMatrix[GetMaximumElement(previousMatrix)[0, 0], GetMaximumElement(previousMatrix)[1, 0]]/(previousMatrix[GetMaximumElement(previousMatrix)[0, 0], GetMaximumElement(previousMatrix)[0, 0]] - previousMatrix[GetMaximumElement(previousMatrix)[1, 0], GetMaximumElement(previousMatrix)[1, 0]]))
        nextMatrix ← transpose(BuildRotationMatrix(GetMaximumElement(previousMatrix)[0, 0], GetMaximumElement(previousMatrix)[1, 0], φ))*previousMatrix*BuildRotationMatrix(GetMaximumElement(previousMatrix)[0, 0], GetMaximumElement(previousMatrix)[1, 0], φ)
        rotationMatrix ← rotationMatrix*BuildRotationMatrix(GetMaximumElement(previousMatrix)[0, 0], GetMaximumElement(previousMatrix)[1, 0], φ)
    [nextMatrix; rotationMatrix]
rotationResultMatrix := RotationMethod[0, 0] = [9.41886, 0, 0, 0; 0, 5.29062, 0, 0; 0, 0, 3.38699, 0; 0, 0, 0, 1.82353]
# Найдём собственные значения:
eigenValuesRotation := [
    rotationResultMatrix[0, 0];
    rotationResultMatrix[1, 1];
    rotationResultMatrix[2, 2];
    rotationResultMatrix[3, 3]
] = [9.41886; 5.29062; 3.38699; 1.82353]
# Проверим найденные собственные значения:
eigenvals(initialMatrix) = [1.82353; 3.38699; 5.29062; 9.41886]
# Найдём собственные векторы и займёмся их нормировкой путём деления на последнюю компоненту:
eigenVectorsRotation := RotationMethod[1, 0] = [
    0.988539, -0.124434, -0.0821786, 0.023538;
    0.125646, 0.985355, -0.0133926, -0.114495;
    0.0817709, 0.0154291, 0.990811, 0.106623;
    -0.0178257, 0.115557, -0.106585, 0.987405
]
x1Rotation := RationingVectors(eigenVectorsRotation[:, 0]) = [-55.4558; -7.04857; -4.58725; 1]
VerifyEigenVectors(rotationResultMatrix[0, 0], x1Rotation) = [-1.9193e-13; -2.72005e-14; -8.96505e-15; 0]
x2Rotation := RationingVectors(eigenVectorsRotation[:, 1]) = [-1.07681; 8.527; 0.133519; 1]
VerifyEigenVectors(rotationResultMatrix[1, 1], x2Rotation) = [-1.52656e-15; 9.88098e-15; -5.82867e-16; 4.44089e-16]
x3Rotation := RationingVectors(eigenVectorsRotation[:, 2]) = [0.771014; 0.125651; -9.29596; 1]
VerifyEigenVectors(rotationResultMatrix[2, 2], x3Rotation) = [6.13398e-15; -2.67564e-14; 2.6229e-14; 2.36478e-13]
x4Rotation := RationingVectors(eigenVectorsRotation[:, 3]) = [0.0238383; -0.115955; 0.107983; 1]
VerifyEigenVectors(rotationResultMatrix[3, 3], x4Rotation) = [2.16493e-15; 3.33067e-16; -2.56184e-14; 2.65066e-15]
# Метод λ-разности:
firstEigenValueLambdaDifferences := PowerLawMethod[0, 0] = 9.41886
LambdaDifferencesMethod(m) :=
    initialVectorY ← [1; 1; 1; 1]
    k ← 0
    while k < m
        k ← k + 1
        vectorY ← initialMatrix^k*initialVectorY
    vectorY
m := 49
secondEigenValueLambdaDifferences := (LambdaDifferencesMethod(m + 1)[1, 0] - firstEigenValueLambdaDifferences*LambdaDifferencesMethod(m)[1, 0])/(LambdaDifferencesMethod(m)[1, 0] - firstEigenValueLambdaDifferences*LambdaDifferencesMethod(m - 1)[1, 0]) = 5.29149
# Проверим найденные собственные значения:
eigenvals(initialMatrix) = [1.82353; 3.38699; 5.29062; 9.41886]
# Собственный вектор:
eigenVectorLambdaDifferences := LambdaDifferencesMethod(m + 1) - firstEigenValueLambdaDifferences*LambdaDifferencesMethod(m)
RationingVectors(eigenVectorLambdaDifferences) = [-1.06166; 8.53083; 0.133919; 1]
VerifyEigenVectors(secondEigenValueLambdaDifferences, RationingVectors(eigenVectorLambdaDifferences)) = [0.0640278; 0.000604254; 0.00682864; -0.00205617]
