# Лабораторная работа 3.1. Решение систем линейных алгебраических уравнений
# Исхолдные данные:
initialMatrix := [9.31, 0.52, 0.48, -0.17; 0.52, 5.31, 0.11, 0.38; 0.48, 0.11, 3.41, -0.17; -0.17, 0.38, -0.17, 1.89]
initialValues := [-1.68; -3.9; -4.2; 7.35]
accuracy := 0.5*10^-4
n := rank(initialMatrix) = 4
# Перейдём к методу простых итераций, проверив условие сходимости по теоремам 1 и 2:
ConversionToMatrixBforSIM(initialMatrix, initialValues) :=
    n ← n - 1
    for i ∈ 0 .. n
        for k ∈ 0 .. n
            matrixB[i, k] ← 0 if i == k
            matrixB[i, k] ← -initialMatrix[i, k]/initialMatrix[i, i] otherwise
    for j ∈ 0 .. n
        norm[j] ← sum(|matrixB[j, 0]|, j = 0 .. n)
    [matrixB; norm]
matrixBtoSIM := ConversionToMatrixBforSIM(initialMatrix, initialValues)[0] = [
    0, -0.0558539, -0.0515575, 0.0182599;
    -0.0979284, 0, -0.0207156, -0.0715631;
    -0.140762, -0.0322581, 0, 0.0498534;
    0.0899471, -0.201058, 0.0899471, 0
]
# Найдём собственные значения матрицы B:
eigenvals(matrixBtoSIM) = [0.164503; 0.0905882; -0.130485; -0.124606]
# Все собственные значения матрицы по модулю меньше 1, значит, условие теоремы 1 выполнилось
# Найдём норму матрицы B:
maxNorm := max(ConversionToMatrixBforSIM(initialMatrix, initialValues)[1]) = 0.328638
# Значение нормы меньше 1, значит, условие теоремы 2 выполнилось
# Поскольку условия каждой из теорем выполнились, то метод простых итераций сходится
# Метод простых итераций:
ORIGIN := 1
SimpleIterationsMethod(initialMatrix, initialValues, accuracy) :=
    initialApproximationX ← initialValues
    itarationsNumber ← 0
    while 1
        for i ∈ 1 .. n
            previousAmount ← sum(initialMatrix[i, k]*initialApproximationX[k], k = 1 .. i - 1) if i > 1
            previousAmount ← 0 otherwise
            currentAmount ← sum(initialMatrix[i, k]*initialApproximationX[k], k = i + 1 .. n) if i < n
            currentAmount ← 0 otherwise
            currentApproximationX[i] ← (initialValues[i] - previousAmount - currentAmount)/initialMatrix[i, i]
        break if |max(currentApproximationX - initialApproximationX)| ≤ accuracy
        initialApproximationX ← currentApproximationX
        itarationsNumber ← itarationsNumber + 1
    [currentApproximationX; itarationsNumber]
λSIM := SimpleIterationsMethod(initialMatrix, initialValues, accuracy)[1] = [2.99799e-6; -1; -0.999997; 4.00001]
iterationsNumberSIM := SimpleIterationsMethod(initialMatrix, initialValues, accuracy)[2] = 6
initialMatrix*λSIM = [-1.67997; -3.90001; -4.19999; 7.35001]
initialValues = [-1.68; -3.9; -4.2; 7.35]
# Таким образом, найденное решение системы линейных алгебраических уравнений верно
# Решение системы линейных алгебраических уравнений (через встроенную функцию):
solutionXforSIM := lsolve(initialMatrix, initialValues) = [0; -1; -1; 4]
# Перейдём к методу Зейделя:
m := rank(initialMatrix) - 1 = 3
ORIGIN := 0
matrixE := identity(rows(initialMatrix)) = [1, 0, 0, 0; 0, 1, 0, 0; 0, 0, 1, 0; 0, 0, 0, 1]
# Заданную систему линейных алгебраических уравнений представим в виде матрицы B:
ConversionToMatrixBforSM(initialMatrix, m) :=
    for i ∈ 0 .. m
        for k ∈ 0 .. m
            B[i, k] ← (-initialMatrix)[i, k] if i ≠ k
            B[i, k] ← 1 - initialMatrix[i, k] if i == k
    B
matrixBforSM := ConversionToMatrixBforSM(initialMatrix, m) = [
    -8.31, -0.52, -0.48, 0.17;
    -0.52, -4.31, -0.11, -0.38;
    -0.48, -0.11, -2.41, 0.17;
    0.17, -0.38, 0.17, -0.89
]
# По матрице B построим две вспомогательные матрицы H и F:
GettingTwoMatricesForSM(matrixBforSM, m) :=
    for i ∈ 0 .. m
        for k ∈ 0 .. m
            matrixM[k, i] ← 0 if k ≤ i
            matrixM[k, i] ← matrixBforSM[k, i] if k > i
            matrixN[k, i] ← 0 if k > i
            matrixN[k, i] ← matrixBforSM[k, i] if k ≤ i
    [matrixM; matrixN]
matrixH := GettingTwoMatricesForSM(matrixBforSM, m)[0] = [0, 0, 0, 0; -0.52, 0, 0, 0; -0.48, -0.11, 0, 0; 0.17, -0.38, 0.17, 0]
matrixF := GettingTwoMatricesForSM(matrixBforSM, m)[1] = [-8.31, -0.52, -0.48, 0.17; 0, -4.31, -0.11, -0.38; 0, 0, -2.41, 0.17; 0, 0, 0, -0.89]
# Метод Зейделя:
SeidelMethod(matrixH, matrixF, matrixBforSM, m) :=
    initialApproximationX ← matrixH[:, 0]
    iterationsNumber ← 0
    if normi(matrixBforSM) < 1
        for i ∈ 0 .. m
            currentApproximationX ← (matrixE - matrixH)^-1*matrixF*initialApproximationX + (matrixE - matrixH)^-1*initialValues
        if |max(currentApproximationX - initialApproximationX)| < accuracy
            {
                break
            }
        initialApproximationX ← currentApproximationX
        iterationsNumber ← iterationsNumber + 1
    otherwise
        initialApproximationX ← eigenvals((matrixE - matrixH)^-1*matrixF)
        iterationsNumber ← "Метод расходится"
    [initialApproximationX; iterationsNumber]
λSM := SeidelMethod(matrixH, matrixF, matrixBforSM, m)[0] = [-7.3197; -4.46707; -2.46333; -0.953776]
k := SeidelMethod(matrixH, matrixF, matrixBforSM, m)[1] = "Метод расходится"
SeidelMethod(matrixH, matrixF, matrixBforSM, m) = [[-7.3197; -4.46707; -2.46333; -0.953776]; "Метод расходится"]
# Таким образом, мы не получили решение системы линейных алгебраических уравнений, так как метод Зейделя расходится (ввиду того, норма матрицы B больше 1)
# Перейдём к методу квадратного корня:
initialMatrix = [9.31, 0.52, 0.48, -0.17; 0.52, 5.31, 0.11, 0.38; 0.48, 0.11, 3.41, -0.17; -0.17, 0.38, -0.17, 1.89]
# Перед применениме данного метода необходимо проверить следующие условия:
# 1) Матрица должна быть невырожденной (определитель отличет от нуля):
|initialMatrix| = 307.773
# 2) Матрица должна быть симметричной (исходная и транспонированная исходная матрицы равны):
transpose(initialMatrix) = [9.31, 0.52, 0.48, -0.17; 0.52, 5.31, 0.11, 0.38; 0.48, 0.11, 3.41, -0.17; -0.17, 0.38, -0.17, 1.89]
# Поскольку необходимые условия выполнены, то можем перейти к реализации метода
# Метод квадратного корня:
len := length(initialValues) = 4
ORIGIN := 1
SquareRootMethod(initialMatrix, initialValues, len) :=
    for i ∈ 1 .. len
        matrixD[i, 1] ← initialMatrix[i, 1]
        matrixC[1, i] ← initialMatrix[1, i]/matrixD[1, 1]
        matrixC[i, i] ← 1
    for i ∈ 2 .. len
        for j ∈ 2 .. len
            if i ≥ j
                S ← 0
                for k ∈ 1 .. j - 1
                    S ← S + matrixD[i, k]*matrixC[k, j]
                matrixD[i, j] ← initialMatrix[i, j] - S
            otherwise
                S ← 0
                for k ∈ 1 .. i - 1
                    S ← S + matrixD[i, k]*matrixC[k, j]
                matrixC[i, j] ← (initialMatrix[i, j] - S)/matrixD[i, i]
    vectorY[1] ← initialValues[1]/matrixD[1, 1]
    for i ∈ 2 .. len
        S ← 0
        for k ∈ 1 .. i - 1
            S ← S + matrixD[i, k]*vectorY[k]
        vectorY[i] ← (initialValues[i] - S)/matrixD[i, i]
    currentApproximationX[len] ← vectorY[len]
    for i ∈ len - 1 .. 1
        S ← 0
        for k ∈ i + 1 .. len
            S ← S + matrixC[i, k]*currentApproximationX[k]
        currentApproximationX[i] ← vectorY[i] - S
    currentApproximationX  # Получим элементы первой строки
# Находим вспомогательный вектор Y
# Находим вектор решений
λSRM := SquareRootMethod(initialMatrix, initialValues, len) = [0; -1; -1; 4]
initialMatrix*λSRM = [-1.68; -3.9; -4.2; 7.35]
initialValues = [-1.68; -3.9; -4.2; 7.35]
# Таким образом, найденное решение системы линейных алгебраических уравнений верно
# Решение системы линейных алгебраических уравнений (через встроенную функцию):
solutionXforSRM := lsolve(initialMatrix, initialValues) = [0; -1; -1; 4]
